// COMSOL Multiphysics 6.4.0.293 model "E3_base.mph"
// Outline of the model tree

Parameters
  r_i = 5.5[mm]  // 内壁半径
  r_o = 6.5[mm]  // 外壁半径
  L_z = 0.6[m]  // 管长
  z_T = 0.25[m]  // 发射中心
  z_R = 0.35[m]  // 接收中心
  z_ab = 0.06[m]  // 吸收区长度
  rho_al = 2810[kg/m^3]  // 7075 密度（params_pipe）
  E_al = 7.24596e+10[Pa]  // 7075 杨氏模量
  nu_al = 0.333252  // 7075 泊松比
  sig_al = 1.9e7[S/m]  // 7075-T6 电导率（33% IACS）
  rho_f = 865[kg/m^3]  // 液压油密度（设计值）
  c_f = 1450[m/s]  // 液压油声速（设计值，待实测）
  B_rem = 1.35[T]  // N45H 剩磁
  mur_m = 1.05  // NdFeB 相对磁导率
  sig_cu = 5.998e7[S/m]  // 铜电导率
  A_wire = 1.767e-8[m^2]  // 0.15 mm 漆包线截面
  N_w = 35  // 壁组每元件匝数
  N_l = 19  // 液组每元件匝数
  I0 = 10[A]  // 发射电流峰值（线性问题，只定标度）
  f0 = 520[kHz]  // 发射中心频率
  Nc = 5  // 发射周期数
  Tb = Nc/f0  // 突发包络长度
  txw = 1  // =1 发射壁组
  txl = 0  // =1 发射液组
  frad = 1  // =0 关掉洛伦兹力的径向分量 F_r（反串增益对照，E3 §7 末行）
  beta_max = 2e-7[s]  // 吸收区 Rayleigh beta 峰值
  dt_out = 2e-7[s]  // 输出时间步
  dt_sol = 5e-8[s]  // 求解器时间步
  t_end = 130[us]  // 记录长度

Variables
  vg "变量"
    Ibrst = I0*sin(2*pi*f0*t)*0.5*(1-cos(2*pi*t/Tb))*(t<Tb)*(t>=0)  // 发射突发电流
    V_rx_w = mf2.VCoil_6-mf2.VCoil_7+mf2.VCoil_8  // 接收壁组串联电动势
    V_rx_l = mf2.VCoil_9-mf2.VCoil_10  // 接收液组串联电动势
    beta_ab = beta_max*((z<z_ab)*((z_ab-z)/z_ab)^2+(z>(L_z-z_ab))*((z-(L_z-z_ab))/z_ab)^2)  // 吸收区阻尼斜坡

Selections
  sel_fluid: Explicit "dom fluid" on domains 1-5
  sel_wall: Explicit "dom wall" on domains 6-15
  sel_wallMF: Explicit "dom wallMF" on domains 8, 13
  sel_fluidMF: Explicit "dom fluidMF" on domains 3
  sel_absorb: Explicit "dom absorb" on domains 6, 10, 11, 15
  sel_magP: Explicit "dom magP" on domains 27, 29, 30, 32
  sel_magN: Explicit "dom magN" on domains 28, 31
  sel_mag: Explicit "dom mag" on domains 27-32
  sel_cw: Explicit "dom cw" on domains 17, 19, 21, 22, 24, 26
  sel_cl: Explicit "dom cl" on domains 18, 20, 23, 25
  sel_coil: Explicit "dom coil" on domains 17-26
  sel_mfall: Explicit "dom mfall" on domains 3, 8, 13, 16-32
  sel_air: Explicit "dom air" on domains 16
  bnd_wallEnd: Explicit "bnd wallEnd" on boundaries 13, 22, 24, 33
  bnd_fluidEnd: Explicit "bnd fluidEnd" on boundaries 2, 11
  bnd_fsi: Explicit "bnd fsi" on boundaries 12, 14, 16, 18, 20
  bnd_wallOut: Explicit "bnd wallOut" on boundaries 36

Geometry
  geom1 "几何 1" (2D axisymmetric, length unit m)
    mfbox: Rectangle "矩形" | size = {0.045, 0.24}; pos = {0, 0.18}
    fl1: Rectangle "矩形 1" | size = {0.0055, 0.06}
    wi1: Rectangle "矩形 1a" | size = {0.00084, 0.06}; pos = {0.0055, 0}
    wo1: Rectangle "矩形 1b" | size = {0.00016, 0.06}; pos = {0.00634, 0}
    fl2: Rectangle "矩形 2" | size = {0.0055, 0.12}; pos = {0, 0.06}
    wi2: Rectangle "矩形 2a" | size = {0.00084, 0.12}; pos = {0.0055, 0.06}
    wo2: Rectangle "矩形 2b" | size = {0.00016, 0.12}; pos = {0.00634, 0.06}
    fl3: Rectangle "矩形 3" | size = {0.0055, 0.24}; pos = {0, 0.18}
    wi3: Rectangle "矩形 3a" | size = {0.00084, 0.24}; pos = {0.0055, 0.18}
    wo3: Rectangle "矩形 3b" | size = {0.00016, 0.24}; pos = {0.00634, 0.18}
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    fin: Finalize "形成联合体" | symmetriccoord = 8

Materials
  mat_al: Common "Al 7075-T6" on domains 6-15
    def: def "基本"
      density = rho_al
      electricconductivity = sig_al
      relpermeability = 1
      relpermittivity = 1
    Enu: Enu "杨氏模量和泊松比"
      E = E_al
      nu = nu_al
  mat_oil: Common "液压油" on domains 1-5
    def: def "基本"
      density = rho_f
      soundspeed = c_f
      electricconductivity = 0
      relpermeability = 1
      relpermittivity = 1
  mat_mag: Common "NdFeB N45H" on domains 27-32
    def: def "基本"
      electricconductivity = 0
      relpermeability = mur_m
      relpermittivity = 1
  mat_cu: Common "铜线圈" on domains 17-26
    def: def "基本"
      electricconductivity = sig_cu
      relpermeability = 1
      relpermittivity = 1
  mat_air: Common "空气" on domains 16
    def: def "基本"
      electricconductivity = 0
      relpermeability = 1
      relpermittivity = 1

Physics
  mf: InductionCurrents "磁场" on selection sel_mfall
    dependent variable A = {Ar, Aphi, Az}
    fsp1: FreeSpace "自由空间 1" (default)
    axi1: AxialSymmetry "轴对称 1" (default)
    mi1: MagneticInsulation "磁绝缘 1" (default)
    init1: init "初始值 1" (default)
    al_all: AmperesLaw "安培定律" on selection sel_mfall
    al_magP: AmperesLaw "磁体剩磁 magP" on domains 27, 29, 30, 32
      ConstitutiveRelationBH = RemanentFluxDensity
      e_crel_BH_RemanentFluxDensity = {1, 0, 0}
      mur_crel_BH_RemanentFluxDensity_mat = userdef
      mur_crel_BH_RemanentFluxDensity = mur_m
      normBr_crel_BH_RemanentFluxDensity_mat = userdef
      normBr_crel_BH_RemanentFluxDensity = B_rem
    al_magN: AmperesLaw "磁体剩磁 magN" on domains 28, 31
      ConstitutiveRelationBH = RemanentFluxDensity
      e_crel_BH_RemanentFluxDensity = {-1, 0, 0}
      mur_crel_BH_RemanentFluxDensity_mat = userdef
      mur_crel_BH_RemanentFluxDensity = mur_m
      normBr_crel_BH_RemanentFluxDensity_mat = userdef
      normBr_crel_BH_RemanentFluxDensity = B_rem
  mf2: InductionCurrents "磁场 2" on selection sel_mfall
    dependent variable A2 = {A2r, A2phi, A2z}
    fsp1: FreeSpace "自由空间 1" (default)
    axi1: AxialSymmetry "轴对称 1" (default)
    mi1: MagneticInsulation "磁绝缘 1" (default)
    init1: init "初始值 1" (default)
    al_all: AmperesLaw "安培定律" on selection sel_mfall
    ecd_mot: ExternalCurrentDensity "动生电动势 sigma*(v x B0)" on selection sel_wallMF
      Je = {0, sig_al*(solid.u_tZ*mf.Br - solid.u_tR*mf.Bz), 0}
    coil1: Coil "线圈1 TXw +" on domains 17
      ConductorModel = Multi
      CoilExcitation = Current
      CoilName = 1
      ICoil = txw*Ibrst
      N = N_w
      AreaFrom = UserDefined
      coilWindArea = A_wire
    coil2: Coil "线圈2 TXw -" on domains 19
      ConductorModel = Multi
      CoilExcitation = Current
      CoilName = 2
      ICoil = -(txw*Ibrst)
      N = N_w
      AreaFrom = UserDefined
      coilWindArea = A_wire
    coil3: Coil "线圈3 TXw +" on domains 21
      ConductorModel = Multi
      CoilExcitation = Current
      CoilName = 3
      ICoil = txw*Ibrst
      N = N_w
      AreaFrom = UserDefined
      coilWindArea = A_wire
    coil4: Coil "线圈4 TXl +" on domains 18
      ConductorModel = Multi
      CoilExcitation = Current
      CoilName = 4
      ICoil = txl*Ibrst
      N = N_l
      AreaFrom = UserDefined
      coilWindArea = A_wire
    coil5: Coil "线圈5 TXl -" on domains 20
      ConductorModel = Multi
      CoilExcitation = Current
      CoilName = 5
      ICoil = -(txl*Ibrst)
      N = N_l
      AreaFrom = UserDefined
      coilWindArea = A_wire
    coil6: Coil "线圈6 RXw +" on domains 22
      ConductorModel = Multi
      CoilExcitation = Current
      CoilName = 6
      ICoil = 0[A]
      N = N_w
      AreaFrom = UserDefined
      coilWindArea = A_wire
    coil7: Coil "线圈7 RXw -" on domains 24
      ConductorModel = Multi
      CoilExcitation = Current
      CoilName = 7
      ICoil = 0[A]
      N = N_w
      AreaFrom = UserDefined
      coilWindArea = A_wire
    coil8: Coil "线圈8 RXw +" on domains 26
      ConductorModel = Multi
      CoilExcitation = Current
      CoilName = 8
      ICoil = 0[A]
      N = N_w
      AreaFrom = UserDefined
      coilWindArea = A_wire
    coil9: Coil "线圈9 RXl +" on domains 23
      ConductorModel = Multi
      CoilExcitation = Current
      CoilName = 9
      ICoil = 0[A]
      N = N_l
      AreaFrom = UserDefined
      coilWindArea = A_wire
    coil10: Coil "线圈10 RXl -" on domains 25
      ConductorModel = Multi
      CoilExcitation = Current
      CoilName = 10
      ICoil = 0[A]
      N = N_l
      AreaFrom = UserDefined
      coilWindArea = A_wire
  solid: SolidMechanics "固体力学" on selection sel_wall
    dependent variable u = {u, v, w}
    lemm1: LinearElasticModel "线弹性材料 1" (default)
    axi1: AxialSymmetrySolid "轴对称 1" (default)
    free1: Free "自由 1" (default)
    init1: init "初始值 1" (default)
    lemm_ab: LinearElasticModel "吸收区（Rayleigh 斜坡）" on selection sel_absorb
      dmp1: Damping "阻尼 1" on all domains
        DampingType = RayleighDamping
        alpha_dM = 0
        beta_dK = beta_ab
        InputParameters = AlphaBeta
    bl_lorentz: BodyLoad "洛伦兹力 J x B0（frad=0 时只留轴向分量）" on selection sel_wallMF
      FperVol = {frad*mf2.Jphi*mf.Bz, 0, -mf2.Jphi*mf.Br}
    lrb1: LowReflectingBoundary "低反射边界 1" on selection bnd_wallEnd
  actd: TransientPressureAcoustics "压力声学，瞬态" on selection sel_fluid
    dependent variable p
    tpam1: TransientPressureAcousticsModel "瞬态压力声学模型 1" (default)
    axi1: AxialSymmetry "轴对称 1" (default)
    shb1: SoundHard "硬声场边界（壁） 1" (default)
    init1: init "初始值 1" (default)
    pwr1: PlaneWaveRadiation "平面波辐射 1" on selection bnd_fluidEnd

Multiphysics
  asb1: AcousticStructureBoundary "声–结构边界 1" on selection bnd_fsi | Acoustics_physics = actd; Structure_physics = solid

Mesh
  mesh1 "网格 1"
    map1: Map "映射 1" on domains 1-15
      disz1: Distribution "分布 1" on boundaries 1, 12, 23, 34 | numelem = 120
      disz2: Distribution "分布 2" on boundaries 3, 14, 25, 35 | numelem = 240
      disz3: Distribution "分布 3" on boundaries 5, 16, 27, 36 | numelem = 960
      disz4: Distribution "分布 4" on boundaries 7, 18, 29, 38 | numelem = 240
      disz5: Distribution "分布 5" on boundaries 9, 20, 31, 40 | numelem = 120
      disr1: Distribution "分布 1a" on boundaries 2, 4, 6, 8, 10, 11 | numelem = 10
      disr2: Distribution "分布 2a" on boundaries 13, 15, 17, 19, 21, 22 | numelem = 4
      disr3: Distribution "分布 3a" on boundaries 24, 26, 28, 30, 32, 33 | numelem = 4
    map2: Map "映射 2" on domains 17-26
      dzw: Distribution "分布" on boundaries 41, 47, 53, 56, 62, 68, 71, 73, 75, 76, 78, 80 | numelem = 35
      dzl: Distribution "分布 2" on boundaries 44, 50, 59, 65, 72, 74, 77, 79 | numelem = 19
      dr: Distribution "分布 3" on boundaries 42, 43, 45, 46, 48, 49, 51, 52, 54, 55, 57, 58, 60, 61, 63, 64, 66, 67, 69, 70
        numelem = 2
    ftri_mag: FreeTri "自由三角形网格" on domains 27-32
      size1: Size "大小 1" on domains 27-32 | hmax = 0.0005; custom = on
    ftri_air: FreeTri "自由三角形网格 2" on domains 16
      size1: Size "大小 1" on domains 16 | hmax = 0.003; hmin = 5e-05; hgrad = 1.35; custom = on
      size2: Size "大小 2" on selection bnd_wallOut | hmax = 0.0003; custom = on

Studies
  std1 "Study 1 静磁"
    stat: Stationary "稳态" | solve for = {mf}
  std2 "Study 2 瞬态"
    time: Transient "瞬态"
      tlist = range(0,dt_out,t_end)
      solve for = {mf2, solid, actd}
      usesol = on
      notsolmethod = sol
      notstudy = std1

Solver configurations
  sol1 "解 1" (study std1)
    v1: Variables "因变量 1"
    s1: Stationary "稳态求解器 1"
      dDef: Direct "直接"
      fc1: FullyCoupled "全耦合 1"
  sol2 "解 2" (study std2)
    v1: Variables "因变量 1"
    t1: Time "瞬态求解器 1"
      tlist = range(0,dt_out,t_end)
      timemethod = genalpha
      tstepsgenalpha = manual
      timestepgenalpha = dt_sol
      fc1: FullyCoupled "全耦合 1" | linsolver = d1; maxiter = 4
      d1: Direct "直接 1" | linsolver = pardiso

Datasets
  dset1: Solution | solution = sol1
  dset2: Solution | solution = sol2